*Heading
** Job name: Job-2 Model name: Model-1
** Generated by: Abaqus/CAE 2023.HF2
*Preprint, echo=NO, model=NO, history=NO, contact=NO
**
** PARTS
**
*Part, name=Part-21
*End Part
**
**
** ASSEMBLY
**
*Assembly, name=Assembly
**
*Instance, name=Part-21-1, part=Part-21
*Node
      1,         -40.,          2.5,          10.
      2,         -40.,           0.,          10.
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*Element, type=C3D20RT
  1,  118,  935, 2803,  863,    1,   67,  827,   88, 4246, 4245, 4244, 4243, 4247, 4248, 4249,
     4250, 4252, 4251, 4253, 4254
  2,  935,  936, 2804, 2803,   67,   68,  828,  827, 4257, 4256, 4255, 4245, 4258, 4259, 4260,
     4248, 4251, 4261, 4262, 4253
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*Nset, nset=Set-1
    1,    2,    3,    4,    5,    6
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*Elset, elset=Set-1, generate
   1,  150,    1
*Nset, nset=Set-2
    3,    4,    6,    7,   13,   14
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*Elset, elset=Set-2, generate
 301,  450,    1
*Nset, nset=Set-3
   13,   14,   15,   16,   19,   20
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*Elset, elset=Set-3, generate
 601,  750,    1
*Nset, nset=Set-4
   19,   20,   21,   22,   25,   26
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*Elset, elset=Set-4, generate
  901,  1050,     1
*Nset, nset=Set-5
   25,   26,   27,   28,   31,   32
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*Elset, elset=Set-5, generate
 1201,  1350,     1
*Nset, nset=Set-6
    31,    32,    33,    34,    37,    38
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*Elset, elset=Set-6, generate
 1501,  1650,     1
*Nset, nset=Set-7
    37,    38,    39,    40,    43,    44
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*Elset, elset=Set-7, generate
 1801,  1950,     1
*Nset, nset=Set-8
    43,    44,    45,    46,    49,    50
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*Elset, elset=Set-8, generate
 2101,  2250,     1
*Nset, nset=Set-9
    49,    50,    51,    52,    55,    56
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*Elset, elset=Set-9, generate
 2401,  2550,     1
*Nset, nset=Set-10
    55,    56,    57,    58,    61,    62
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*Elset, elset=Set-10, generate
 2701,  2850,     1
*Nset, nset=Set-11
    2,    3,    5,    6,    9,   10
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*Elset, elset=Set-11, generate
 151,  300,    1
*Nset, nset=Set-12
    3,    6,   10,   12,   13,   15
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*Elset, elset=Set-12, generate
 451,  600,    1
*Nset, nset=Set-13
   13,   15,   17,   18,   19,   21
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*Elset, elset=Set-13, generate
 751,  900,    1
*Nset, nset=Set-14
   19,   21,   23,   24,   25,   27
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*Elset, elset=Set-14, generate
 1051,  1200,     1
*Nset, nset=Set-15
   25,   27,   29,   30,   31,   33
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*Elset, elset=Set-15, generate
 1351,  1500,     1
*Nset, nset=Set-16
    31,    33,    35,    36,    37,    39
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*Elset, elset=Set-16, generate
 1651,  1800,     1
*Nset, nset=Set-17
    37,    39,    41,    42,    43,    45
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*Elset, elset=Set-17, generate
 1951,  2100,     1
*Nset, nset=Set-18
    43,    45,    47,    48,    49,    51
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*Elset, elset=Set-18, generate
 2251,  2400,     1
*Nset, nset=Set-19
    49,    51,    53,    54,    55,    57
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*Elset, elset=Set-19, generate
 2551,  2700,     1
*Nset, nset=Set-20
    55,    57,    59,    60,    61,    63
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*Elset, elset=Set-20, generate
 2851,  3000,     1
** Section: Section-0times
*Solid Section, elset=Set-1, material=Material-0times-30min
,
** Section: Section-1times
*Solid Section, elset=Set-11, material=Material-1times-30min
,
** Section: Section-0times
*Solid Section, elset=Set-2, material=Material-0times-30min
,
** Section: Section-0times
*Solid Section, elset=Set-12, material=Material-0times-30min
,
** Section: Section-0times
*Solid Section, elset=Set-3, material=Material-0times-30min
,
** Section: Section-1times
*Solid Section, elset=Set-13, material=Material-1times-30min
,
** Section: Section-0times
*Solid Section, elset=Set-4, material=Material-0times-30min
,
** Section: Section-1times
*Solid Section, elset=Set-14, material=Material-1times-30min
,
** Section: Section-0times
*Solid Section, elset=Set-5, material=Material-0times-30min
,
** Section: Section-1times
*Solid Section, elset=Set-15, material=Material-1times-30min
,
** Section: Section-0times
*Solid Section, elset=Set-6, material=Material-0times-30min
,
** Section: Section-1times
*Solid Section, elset=Set-16, material=Material-1times-30min
,
** Section: Section-0times
*Solid Section, elset=Set-7, material=Material-0times-30min
,
** Section: Section-0times
*Solid Section, elset=Set-17, material=Material-0times-30min
,
** Section: Section-0times
*Solid Section, elset=Set-8, material=Material-0times-30min
,
** Section: Section-1times
*Solid Section, elset=Set-18, material=Material-1times-30min
,
** Section: Section-0times
*Solid Section, elset=Set-9, material=Material-0times-30min
,
** Section: Section-0times
*Solid Section, elset=Set-19, material=Material-0times-30min
,
** Section: Section-0times
*Solid Section, elset=Set-10, material=Material-0times-30min
,
** Section: Section-0times
*Solid Section, elset=Set-20, material=Material-0times-30min
,
*End Instance
**
*Nset, nset=Set-1, instance=Part-21-1, generate
     1,  15613,      1
*Elset, elset=Set-1, instance=Part-21-1, generate
    1,  3000,     1
*Nset, nset=Set-2, instance=Part-21-1
    1,    2,    5,    8,   67,   68
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*Elset, elset=Set-2, instance=Part-21-1
   1,   2,   3,  31,  32,  33,  61,  62,  63,  91,  92,  93, 121, 122, 123
*Nset, nset=Set-3, instance=Part-21-1
    2,    5,    9,   11,  123,  124
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*Elset, elset=Set-3, instance=Part-21-1
 151, 152, 153, 181, 182, 183, 211, 212, 213, 241, 242, 243, 271, 272, 273
*Nset, nset=Set-4, instance=Part-21-1
    1,    8,  115,  116,  117,  118, 4252, 4438, 4555, 4672, 4789
*Elset, elset=Set-4, instance=Part-21-1, generate
   1,  121,   30
*Nset, nset=Set-5, instance=Part-21-1
    5,    8,   89,   90, 4787, 4794, 4799
*Elset, elset=Set-5, instance=Part-21-1, generate
 121,  123,    1
*End Assembly
*Amplitude, name=Amp-1
             0.,              0.,              1.,              1.
**
** MATERIALS
**
*Material, name=Material-0times-30min
*Conductivity
167000.,
*Density
 1e-09,
*Elastic
 0.22098, 0.3
*Expansion
 0.018938,
*Specific Heat
 8.96e+08,
*Material, name=Material-1times-30min
*Conductivity
167000.,
*Density
 1e-09,
*Elastic
 1.3413, 0.3
*Expansion
 0.021223,
*Specific Heat
 8.96e+08,
**
** BOUNDARY CONDITIONS
**
** Name: BC-1 Type: Temperature
*Boundary
Set-1, 11, 11
** Name: BC-2 Type: Symmetry/Antisymmetry/Encastre
*Boundary
Set-2, ZSYMM
** Name: BC-3 Type: Symmetry/Antisymmetry/Encastre
*Boundary
Set-3, ZSYMM
** Name: BC-4 Type: Symmetry/Antisymmetry/Encastre
*Boundary
Set-4, YSYMM
** Name: BC-5 Type: Symmetry/Antisymmetry/Encastre
*Boundary
Set-5, XSYMM
** ----------------------------------------------------------------
**
** STEP: Step-1
**
*Step, name=Step-1, nlgeom=YES
*Coupled Temperature-displacement, creep=none, deltmx=15.
0.01, 1., 1e-06, 1.
**
** BOUNDARY CONDITIONS
**
** Name: BC-1 Type: Temperature
*Boundary, amplitude=Amp-1
Set-1, 11, 11, 100.
**
** OUTPUT REQUESTS
**
*Restart, write, frequency=0
**
** FIELD OUTPUT: F-Output-1
**
*Output, field, variable=PRESELECT
**
** HISTORY OUTPUT: H-Output-1
**
*Output, history, variable=PRESELECT
*End Step
